New "Storage.battery1" phases=3 bus1=m2001-ESS1 kVA=250 kv=0.48 kWrated=250 kWhrated=500 %reserve=30 State=IDLING %Charge=60 pf=1
New "Storage.battery2" phases=3 bus1=m2001-ESS2 kVA=250 kv=0.48 kWrated=250 kWhrated=500 %reserve=30 State=IDLING %Charge=60 pf=1
