New "SwtControl.wf856_48332_sw" SwitchedObj=line.wf856_48332_sw SwitchedTerm=1 State=open
New "SwtControl.wg127_48332_sw" SwitchedObj=line.wg127_48332_sw SwitchedTerm=1 State=open
New "SwtControl.ln0653457_sw" SwitchedObj=line.ln0653457_sw SwitchedTerm=1 State=open
New "SwtControl.v7173_48332_sw" SwitchedObj=line.v7173_48332_sw SwitchedTerm=1 State=open
New "SwtControl.tsw803273_sw" SwitchedObj=line.tsw803273_sw SwitchedTerm=1 State=open
New "SwtControl.a333_48332_sw" SwitchedObj=line.a333_48332_sw SwitchedTerm=1 State=open
New "SwtControl.tsw320328_sw" SwitchedObj=line.tsw320328_sw SwitchedTerm=1 State=open
New "SwtControl.a8645_48332_sw" SwitchedObj=line.a8645_48332_sw SwitchedTerm=1 State=open
New "SwtControl.tsw568613_sw" SwitchedObj=line.tsw568613_sw SwitchedTerm=1 State=open
