//Lowered Source Voltage
Edit Vsource.source Pu=1.01
//Define yearly loadshape
New "LoadShape.LoadShape4" npts=8760 interval=1.0 mult=(File=LoadShape4.csv) Action=Normalize
//Constant loading for steamgen1
new loadshape.steamgen1 npts=2 interval=0 hour=[0.00,8760.00] mult=[750.0,750.0] qmult=[562.5, 562.5] useactual=yes
edit Generator.SteamGen1 daily=steamgen1 model=1

//Deactivate batteries (replace with load)
edit Storage.Battery1 enabled=no
edit Storage.Battery2 enabled=no

//New load shape for each battery
new loadshape.bat1 npts=8760 interval=1.0 mult=(file=batt_setting/hca9500node_Mon_battmeter1_1.csv col=3, header=yes) qmult=(file=batt_setting/hca9500node_Mon_battmeter1_1.csv col=4, header=yes) useactual=yes
new loadshape.bat2 npts=8760 interval=1.0 mult=(file=batt_setting/hca9500node_Mon_battmeter2_1.csv col=3, header=yes) qmult=(file=batt_setting/hca9500node_Mon_battmeter2_1.csv col=4, header=yes) useactual=yes

//create load
new load.bat1 phases=3 bus1=m2001-ESS1 kW=250 pf=1.0 kV=0.480 mode=1 daily=bat1 yearly=bat1
new load.bat2 phases=3 bus1=m2001-ESS2 kW=250 pf=1.0 kV=0.480 mode=1 daily=bat2 yearly=bat2

//storage monitors
new monitor.bat1 element=load.bat1  terminal=1 mode=65 ppolar=no
new monitor.bat2 element=load.bat2  terminal=1 mode=65 ppolar=no

//Regulator Tap Settings adjustment
edit RegControl.FEEDER_REG1A vreg=120 band=1 revvreg=120 revband=1 TapNum=0
edit RegControl.FEEDER_REG1B vreg=120 band=1 revvreg=120 revband=1 TapNum=0
edit RegControl.FEEDER_REG1C vreg=120 band=1 revvreg=120 revband=1 TapNum=0
edit RegControl.FEEDER_REG2A vreg=120 band=1 revvreg=120 revband=1 TapNum=0
edit RegControl.FEEDER_REG2B vreg=120 band=1 revvreg=120 revband=1 TapNum=0
edit RegControl.FEEDER_REG2C vreg=120 band=1 revvreg=120 revband=1 TapNum=0
edit RegControl.FEEDER_REG3A vreg=123 band=1 revvreg=123 revband=1 TapNum=0
edit RegControl.FEEDER_REG3B vreg=123 band=1 revvreg=123 revband=1 TapNum=0
edit RegControl.FEEDER_REG3C vreg=123 band=1 revvreg=123 revband=1 TapNum=0
edit RegControl.VREG2_A vreg=120 band=1 revvreg=120 revband=1
edit RegControl.VREG2_B vreg=120 band=1 revvreg=120 revband=1
edit RegControl.VREG2_C vreg=120 band=1 revvreg=120 revband=1
edit RegControl.VREG3_A vreg=120 band=1 revvreg=120 revband=1
edit RegControl.VREG3_B vreg=120 band=1 revvreg=120 revband=1
edit RegControl.VREG3_C vreg=120 band=1 revvreg=120 revband=1
edit RegControl.VREG4_A vreg=120 band=1 revvreg=120 revband=1
edit RegControl.VREG4_B vreg=120 band=1 revvreg=120 revband=1
edit RegControl.VREG4_C vreg=120 band=1 revvreg=120 revband=1

new monitor.feeder_reg1a element=Transformer.FEEDER_REG1A terminal=2 mode=2
new monitor.feeder_reg2a element=Transformer.FEEDER_REG2A terminal=2 mode=2
new monitor.feeder_reg3a element=Transformer.FEEDER_REG3A terminal=2 mode=2
new monitor.vreg2a element=Transformer.VREG2_A terminal=2 mode=2
new monitor.vreg3a element=Transformer.VREG3_A terminal=2 mode=2
new monitor.vreg4a element=Transformer.VREG4_A terminal=2 mode=2

//Service transformer adjustments to avoid overloading
edit Transformer.T2001014B XfmrCode=CT50
edit Transformer.T2001015B XfmrCode=CT50
edit Transformer.T225571845B XfmrCode=CT25

//Triplex adjuments to avoid overloading
edit Line.TPX2001400C0 linecode=750_Triplex
edit Line.TPX21396815C0 linecode=750_Triplex
edit Line.TPX21399326C0 linecode=750_Triplex
edit Line.TPX2221108404B0 linecode=750_Triplex
edit Line.TPX2221108405C0 linecode=750_Triplex
edit Line.TPX2221108407B0 linecode=750_Triplex
edit Line.TPX2226061820B0 linecode=750_Triplex
edit Line.TPX338899C0 linecode=750_Triplex
edit Line.TPX338915C0 linecode=750_Triplex
edit Line.TPX338924C0 linecode=750_Triplex
edit Line.TPX338943C0 linecode=750_Triplex
edit Line.TPX338968C0 linecode=750_Triplex
edit Line.TPX338978C0 linecode=750_Triplex
